# OpenSim document version 40000
Model double_pendulum_calibrated:
  gravity: 0 -9.80665 0
  credits: Ajay Seth, Ayman Habib
  publications: For testing
  length_units: meters
  force_units: N
  Ground
  BodySet:
    Body rod1: mass=1 [kg] mass_center=(0 0 0) inertia=(0 0 0 0 0 0) meshes=(cylinder.vtp sphere.vtp)
      PhysicalOffsetFrame rod1_imu: socket_parent=.. translation=(0 0 0) [meters]
          orientation=(1.58547 -0.01078799 0.005427723) [radians]
    Body rod2: mass=1 mass_center=(0 0 0) inertia=(0 0 0 0 0 0) meshes=(cylinder.vtp sphere.vtp)
      PhysicalOffsetFrame rod2_imu: socket_parent=.. translation=(0 0 0) orientation=(1.574114 0.004615355 0.001629702)
  JointSet:
    PinJoint pin1: socket_parent_frame=ground_offset socket_child_frame=rod1_offset
      Coordinate q1: default_value=3.14 range=(-3 3) clamped=false
      PhysicalOffsetFrame ground_offset: socket_parent=/ground translation=(0 1.1 0)
      PhysicalOffsetFrame rod1_offset: socket_parent=/bodyset/rod1 translation=(0 0.5 0)
    PinJoint pin2: socket_parent_frame=/bodyset/rod1 socket_child_frame=rod2_offset
      Coordinate q2: default_value=0 range=(-3 3) clamped=false
      PhysicalOffsetFrame rod2_offset: socket_parent=/bodyset/rod2 translation=(0 0.5 0)
  ForceSet:
    CoordinateActuator Torq1: coordinate=q1 optimal_force=1
    CoordinateActuator Torq2: coordinate=q2 optimal_force=1
  ComponentSet:
    IMU rod1_imu: socket_frame=/bodyset/rod1/rod1_imu
    IMU rod2_imu: socket_frame=/bodyset/rod2/rod2_imu
