# OpenSim document version 40000
Model FESCyclingModel-scaled:
  gravity: 0 -9.80665 0
  length_units: meters
  force_units: N
  credits:
    A planar reduced gait model with 10 degrees of freedom and 18 muscles by Ajay Seth. Closely based on Delp S.L., Loan J.P., Hoy M.G., Zajac F.E., Topp E.L., Rosen J.M., Thelen D.G., Anderson F.C., Seth A. Notes: 3D, 23 DOF gait model created by D.G. Thelen, Univ. of Wisconsin-Madison, and Ajay Seth, Frank C. Anderson, and Scott L. Delp, Stanford University. Lower extremity joint defintions based on Delp et al. (1990). Low back joint and anthropometry based on Anderson and Pandy (1999, 2001). Planar knee model of Yamaguchi and Zajac (1989). Seth replaced tibia translation constraints with a CustomJoint for the knee and removed the patella to eliminate all kinematic constraints; insertions of the quadrucepts are handled with moving points in the tibia frame as defined by Delp 1990. Number of muscles was reduced by Anderson to improve simulation speed for demonstrations and is not intended to be used in research. License: Creative Commons (CCBY 3.0). You are free to distribute, remix, tweak, and build upon this work, even commercially, as long as you credit us for the original creation. http://creativecommons.org/licenses/by/3.0/ More Information: http://simtk-confluence.stanford.edu:8080/display/OpenSim/Gait+2392+and+2354+Models
  publications:
    Delp, S.L., Loan, J.P., Hoy, M.G., Zajac, F.E., Topp E.L., Rosen, J.M.: An interactive graphics-based model of the lower extremity to study orthopaedic surgical procedures, IEEE Transactions on Biomedical Engineering, vol. 37, pp. 757-767, 1990. Yamaguchi G.T., Zajac F.E.: A planar model of the knee joint to characterize the knee extensor mechanism." J . Biomech. vol. 22. pp. 1-10. 1989. Anderson F.C., Pandy M.G.: A dynamic optimization solution for vertical jumping in three dimensions. Computer Methods in Biomechanics and Biomedical Engineering 2:201-231, 1999. Anderson F.C., Pandy M.G.: Dynamic optimization of human walking. Journal of Biomechanical Engineering 123:381-390, 2001.
  Ground
  BodySet:
    Body pelvis: mass=8.346598 [kg] mass_center=(-0.0707 0 0) inertia=(0.07285644 0.06172953 0.0410349 0 0 0)
        meshes=(sacrum.vtp pelvis.vtp l_pelvis.vtp)
    Body femur_r: mass=7.020299 mass_center=(0 -0.173604 0) inertia=(0.1053924 0.02762714 0.1111383 0 0 0)
        meshes=femur_r.vtp
    Body tibia_r: mass=4.046365 mass_center=(0 -0.2155993 0) inertia=(0.07335343 0.007422669 0.07437223 0 0 0)
        meshes=(tibia_r.vtp fibula.vtp)
    Body talus_r: mass=0.07087202 mass_center=(0 0 0) inertia=(0.0007087202 0.0007087202 0.0007087202 0 0 0)
        meshes=talus.vtp
    Body calcn_r: mass=0.8859003 mass_center=(0.1 0.03 0) inertia=(0.0009922083 0.002764009 0.002905753 0 0 0)
        meshes=foot.vtp
    Body toes_r: mass=0.1535088 mass_center=(0.0346 0.006 -0.0175) inertia=(7.087202e-5 0.000141744 7.087202e-5 0 0 0)
        meshes=bofoot.vtp
    Body femur_l: mass=7.020299 mass_center=(0 -0.173604 0) inertia=(0.1053924 0.02762714 0.1111383 0 0 0)
        meshes=femur_l.vtp
    Body tibia_l: mass=4.046365 mass_center=(0 -0.2155993 0) inertia=(0.07335343 0.007422669 0.07437223 0 0 0)
        meshes=(tibia_l.vtp l_fibula.vtp)
    Body talus_l: mass=0.07087202 mass_center=(0 0 0) inertia=(0.0007087202 0.0007087202 0.0007087202 0 0 0)
        meshes=l_talus.vtp
    Body calcn_l: mass=0.8859003 mass_center=(0.1 0.03 0) inertia=(0.0009922083 0.002764009 0.002905753 0 0 0)
        meshes=l_foot.vtp
    Body toes_l: mass=0.1535088 mass_center=(0.0346 0.006 0.0175) inertia=(7.087202e-5 0.000141744 7.087202e-5 0 0 0)
        meshes=l_bofoot.vtp
    Body torso: mass=24.26417 mass_center=(-0.03 0.32 0) inertia=(1.045008 0.5354381 1.014462 0 0 0)
        meshes=(hat_spine.vtp hat_jaw.vtp hat_skull.vtp hat_ribs.vtp)
    Body Right_Foot_Support: mass=0.1771801 mass_center=(0 0 0) inertia=(0.7087202 0.7087202 0.7087202 0 0 0)
        meshes=pedalWrap.obj
    Body Left_Foot_Support: mass=0.1771801 mass_center=(0 0 0) inertia=(0.7087202 0.7087202 0.7087202 0 0 0)
        meshes=pedalWrap.obj
    Body Gear: mass=1.972261 mass_center=(0 0 0) inertia=(1.229063 1.229063 1.229063 0 0 0) meshes=gearSimple.obj
    Body Right_Pedal: mass=0.3543601 mass_center=(0 0 0) inertia=(0.7087202 0.7087202 0.7087202 0 0 0) meshes=pedal.obj
    Body Left_Pedal: mass=0.3543601 mass_center=(0 0 0) inertia=(0.7087202 0.7087202 0.7087202 0 0 0) meshes=pedal.obj
  JointSet:
    CustomJoint ground_pelvis: socket_parent_frame=ground_offset socket_child_frame=pelvis_offset
      Coordinate pelvis_tilt: default_value=0.9162979 range=(-1.570796 1.570796) clamped=false locked=true
      Coordinate pelvis_tx: default_value=-0.7 range=(-5 5) clamped=false locked=true
      Coordinate pelvis_ty: default_value=0.05 range=(-1 2) clamped=false locked=true
      PhysicalOffsetFrame ground_offset: socket_parent=/ground translation=(0 0 0) [meters]
      PhysicalOffsetFrame pelvis_offset: socket_parent=/bodyset/pelvis translation=(0 0 0)
      SpatialTransform: axes_held_at_zero=(rotation2 rotation3)
        TransformAxis rotation1: coordinates=pelvis_tilt axis=(0 0 1) LinearFunction(coefficients=1 0)
        TransformAxis translation1: coordinates=pelvis_tx axis=(1 0 0) LinearFunction(coefficients=1 0)
        TransformAxis translation2: coordinates=pelvis_ty axis=(0 1 0) LinearFunction(coefficients=1 0)
        TransformAxis translation3: axis=(0 0 1) MultiplierFunction(scale=1, Constant(value=0.02))
    PinJoint hip_r: socket_parent_frame=pelvis_offset socket_child_frame=femur_r_offset
      Coordinate hip_flexion_r: default_value=0.6457718 range=(-2.094395 2.094395) clamped=false
      PhysicalOffsetFrame pelvis_offset: socket_parent=/bodyset/pelvis translation=(-0.0707 -0.0661 0.0835)
      PhysicalOffsetFrame femur_r_offset: socket_parent=/bodyset/femur_r translation=(0 0 0)
    CustomJoint knee_r: socket_parent_frame=femur_r_offset socket_child_frame=tibia_r_offset
      Coordinate knee_angle_r: default_value=0.1745329 range=(-2.094395 0.1745329) clamped=false
      PhysicalOffsetFrame femur_r_offset: socket_parent=/bodyset/femur_r translation=(0 0 0)
      PhysicalOffsetFrame tibia_r_offset: socket_parent=/bodyset/tibia_r translation=(0 0 0)
      SpatialTransform: axes_held_at_zero=(rotation2 rotation3 translation3)
        TransformAxis rotation1: coordinates=knee_angle_r axis=(0 0 1) LinearFunction(coefficients=1 0)
        TransformAxis translation1: coordinates=knee_angle_r axis=(1 0 0)
          MultiplierFunction: scale=1.0212
            SimmSpline: x=(-2.0944 -1.74533 -1.39626 -1.0472 -0.698132 -0.349066 -0.174533 0.197344 0.337395 0.490178 1.52146 2.0944)
                y=(-0.0032 0.00179 0.00411 0.0041 0.00212 -0.001 -0.0031 -0.005227 -0.005435 -0.005574 -0.005435 -0.00525)
        TransformAxis translation2: coordinates=knee_angle_r axis=(0 1 0)
          MultiplierFunction: scale=1.0212
            SimmSpline: x=(-2.0944 -1.22173 -0.523599 -0.349066 -0.174533 0.159149 2.0944)
                y=(-0.4226 -0.4082 -0.399 -0.3976 -0.3966 -0.395264 -0.396)
    PinJoint ankle_r: socket_parent_frame=tibia_r_offset socket_child_frame=talus_r_offset
      Coordinate ankle_angle_r: default_value=-1.813531e-14 range=(-1.570796 1.570796) clamped=false locked=true
      PhysicalOffsetFrame tibia_r_offset: socket_parent=/bodyset/tibia_r translation=(0 -0.4965597 0)
      PhysicalOffsetFrame talus_r_offset: socket_parent=/bodyset/talus_r translation=(0 0 0)
    WeldJoint subtalar_r: socket_parent_frame=talus_r_offset socket_child_frame=calcn_r_offset
      PhysicalOffsetFrame talus_r_offset: socket_parent=/bodyset/talus_r translation=(-0.04877 -0.04195 0.00792)
      PhysicalOffsetFrame calcn_r_offset: socket_parent=/bodyset/calcn_r translation=(0 0 0)
    WeldJoint mtp_r: socket_parent_frame=calcn_r_offset socket_child_frame=toes_r_offset
      PhysicalOffsetFrame calcn_r_offset: socket_parent=/bodyset/calcn_r translation=(0.1788 -0.002 0.00108)
      PhysicalOffsetFrame toes_r_offset: socket_parent=/bodyset/toes_r translation=(0 0 0)
    PinJoint hip_l: socket_parent_frame=pelvis_offset socket_child_frame=femur_l_offset
      Coordinate hip_flexion_l: default_value=1.403035 range=(-2.094395 2.094395) clamped=false
      PhysicalOffsetFrame pelvis_offset: socket_parent=/bodyset/pelvis translation=(-0.0707 -0.0661 -0.0835)
      PhysicalOffsetFrame femur_l_offset: socket_parent=/bodyset/femur_l translation=(0 0 0)
    CustomJoint knee_l: socket_parent_frame=femur_l_offset socket_child_frame=tibia_l_offset
      Coordinate knee_angle_l: default_value=-1.477596 range=(-2.094395 0.1745329) clamped=false
      PhysicalOffsetFrame femur_l_offset: socket_parent=/bodyset/femur_l translation=(0 0 0)
      PhysicalOffsetFrame tibia_l_offset: socket_parent=/bodyset/tibia_l translation=(0 0 0)
      SpatialTransform: axes_held_at_zero=(rotation2 rotation3 translation3)
        TransformAxis rotation1: coordinates=knee_angle_l axis=(0 0 1) LinearFunction(coefficients=1 0)
        TransformAxis translation1: coordinates=knee_angle_l axis=(1 0 0)
          MultiplierFunction: scale=1.0212
            SimmSpline: x=(-2.0944 -1.74533 -1.39626 -1.0472 -0.698132 -0.349066 -0.174533 0.197344 0.337395 0.490178 1.52146 2.0944)
                y=(-0.0032 0.00179 0.00411 0.0041 0.00212 -0.001 -0.0031 -0.005227 -0.005435 -0.005574 -0.005435 -0.00525)
        TransformAxis translation2: coordinates=knee_angle_l axis=(0 1 0)
          MultiplierFunction: scale=1.0212
            SimmSpline: x=(-2.0944 -1.22173 -0.523599 -0.349066 -0.174533 0.159149 2.0944)
                y=(-0.4226 -0.4082 -0.399 -0.3976 -0.3966 -0.395264 -0.396)
    PinJoint ankle_l: socket_parent_frame=tibia_l_offset socket_child_frame=talus_l_offset
      Coordinate ankle_angle_l: default_value=8.814676e-15 range=(-1.047198 1.047198) clamped=false locked=true
      PhysicalOffsetFrame tibia_l_offset: socket_parent=/bodyset/tibia_l translation=(0 -0.4965597 0)
      PhysicalOffsetFrame talus_l_offset: socket_parent=/bodyset/talus_l translation=(0 0 0)
    WeldJoint subtalar_l: socket_parent_frame=talus_l_offset socket_child_frame=calcn_l_offset
      PhysicalOffsetFrame talus_l_offset: socket_parent=/bodyset/talus_l translation=(-0.04877 -0.04195 -0.00792)
      PhysicalOffsetFrame calcn_l_offset: socket_parent=/bodyset/calcn_l translation=(0 0 0)
    WeldJoint mtp_l: socket_parent_frame=calcn_l_offset socket_child_frame=toes_l_offset
      PhysicalOffsetFrame calcn_l_offset: socket_parent=/bodyset/calcn_l translation=(0.1788 -0.002 -0.00108)
      PhysicalOffsetFrame toes_l_offset: socket_parent=/bodyset/toes_l translation=(0 0 0)
    PinJoint back: socket_parent_frame=pelvis_offset socket_child_frame=torso_offset
      Coordinate lumbar_extension: default_value=3.614607e-14 range=(-1.570796 1.570796) clamped=false locked=true
      PhysicalOffsetFrame pelvis_offset: socket_parent=/bodyset/pelvis translation=(-0.1007 0.0815 0)
      PhysicalOffsetFrame torso_offset: socket_parent=/bodyset/torso translation=(0 0 0)
    WeldJoint rightFootToPlate: socket_parent_frame=calcn_r_offset socket_child_frame=Right_Foot_Support_offset
      PhysicalOffsetFrame calcn_r_offset: socket_parent=/bodyset/calcn_r translation=(0.12185 -0.02204 0)
      PhysicalOffsetFrame Right_Foot_Support_offset: socket_parent=/bodyset/Right_Foot_Support translation=(0 0 0)
    WeldJoint leftFootToPlate: socket_parent_frame=calcn_l_offset socket_child_frame=Left_Foot_Support_offset
      PhysicalOffsetFrame calcn_l_offset: socket_parent=/bodyset/calcn_l translation=(0.12185 -0.02204 0)
      PhysicalOffsetFrame Left_Foot_Support_offset: socket_parent=/bodyset/Left_Foot_Support translation=(0 0 0)
    PinJoint gearToGround: socket_parent_frame=ground_offset socket_child_frame=Gear_offset
      Coordinate gearToGround_coord_0: default_value=0
      PhysicalOffsetFrame ground_offset: socket_parent=/ground translation=(0 0 0)
      PhysicalOffsetFrame Gear_offset: socket_parent=/bodyset/Gear translation=(0 0 0)
    PinJoint rightPedalToGear: socket_parent_frame=Gear_offset socket_child_frame=Right_Pedal_offset
      Coordinate rightPedalToGear_coord_0: default_value=-1.989675
      PhysicalOffsetFrame Gear_offset: socket_parent=/bodyset/Gear translation=(0 0.1708092 0.1183384)
      PhysicalOffsetFrame Right_Pedal_offset: socket_parent=/bodyset/Right_Pedal translation=(0 0 0)
    PinJoint leftPedalToGear: socket_parent_frame=Gear_offset socket_child_frame=Left_Pedal_offset
      Coordinate leftPedalToGear_coord_0: default_value=-2.427191
      PhysicalOffsetFrame Gear_offset: socket_parent=/bodyset/Gear translation=(0 -0.1708092 -0.1183384)
      PhysicalOffsetFrame Left_Pedal_offset: socket_parent=/bodyset/Left_Pedal translation=(0 0 0)
  ForceSet:
    Millard2012EquilibriumMuscle [values shared by the 18 below unless stated]: optimal_force=1
        max_contraction_velocity=10 activation_time_constant=0.01 [seconds] deactivation_time_constant=0.04 [seconds]
        minimum_activation=0.01
      ActiveForceLengthCurve: minimum_value=0
      ForceVelocityCurve: concentric_slope_at_vmax=0 concentric_slope_near_vmax=0.25 isometric_slope=5
          eccentric_slope_at_vmax=0 eccentric_slope_near_vmax=0.15 max_eccentric_velocity_force_multiplier=1.4
      FiberForceLengthCurve
      TendonForceLengthCurve
    Millard2012EquilibriumMuscle hamstrings_r: max_isometric_force=1500 optimal_fiber_length=0.1132213
        tendon_slack_length=0.3386253 pennation_angle_at_optimal=0 [radians]
      PathPoint bifemlh_r-P1: pelvis (-0.12596 -0.10257 0.06944)
      PathPoint bifemlh_r-P2: tibia_r (-0.03475918 -0.04157244 0.03398547)
      PathPoint bifemlh_r-P3: tibia_r (-0.02702209 -0.06501468 0.0396093)
    Millard2012EquilibriumMuscle bifemsh_r: max_isometric_force=804 optimal_fiber_length=0.1828496
        tendon_slack_length=0.09406716 pennation_angle_at_optimal=0.4014257
      PathPoint P1: femur_r (0.005106 -0.2155753 0.02389608)
      PathPoint P2: tibia_r (-0.03475918 -0.04157244 0.03398547)
      PathPoint P3: tibia_r (-0.02702209 -0.06501468 0.0396093)
    Millard2012EquilibriumMuscle glut_max_r: max_isometric_force=1000 optimal_fiber_length=0.1585351
        tendon_slack_length=0.0740639 pennation_angle_at_optimal=0
      PathPoint P1: pelvis (-0.1317 0.0087 0.0462)
      PathPoint P2: pelvis (-0.1344 -0.0609 0.0813)
      PathPoint P3: femur_r (-0.045954 -0.05963808 0.02573424)
      PathPoint P4: femur_r (-0.01593072 -0.1037539 0.04278828)
    Millard2012EquilibriumMuscle iliopsoas_r: max_isometric_force=2342 optimal_fiber_length=0.1004463
        tendon_slack_length=0.1607141 pennation_angle_at_optimal=0.1396263
      PathPoint psoas_r-P1: pelvis (-0.0647 0.0887 0.0289)
      PathPoint psoas_r-P2: pelvis (-0.0238 -0.057 0.0759)
      ConditionalPathPoint psoas_r-P3: pelvis (-0.0288 -0.0805 0.0816) socket_coordinate=/jointset/hip_r/hip_flexion_r
          range=(-1.5708 0.785398) [radians]
      PathPoint psoas_r-P4: femur_r (0.00163392 -0.05177484 0.00388056)
      PathPoint psoas_r-P5: femur_r (-0.01919856 -0.06096564 0.01062048)
    Millard2012EquilibriumMuscle rect_fem_r: max_isometric_force=2000 optimal_fiber_length=0.1153638
        tendon_slack_length=0.3137085 pennation_angle_at_optimal=0.08726646
      PathPoint P1: pelvis (-0.0295 -0.0311 0.0968)
      ConditionalPathPoint P2: femur_r (0.03410808 -0.4115436 0.00194028)
          socket_coordinate=/jointset/knee_r/knee_angle_r range=(-2.61799 -1.45997)
      MovingPathPoint P3: tibia_r socket_x_coordinate=/jointset/knee_r/knee_angle_r
          socket_y_coordinate=/jointset/knee_r/knee_angle_r socket_z_coordinate=/jointset/knee_r/knee_angle_r
        x_location: MultiplierFunction: scale=1.15479
          SimmSpline: x=(-2.0944 -1.99997 -1.5708 -1.45752 -1.39626 -1.0472 -0.698132 -0.526391 -0.349066 -0.174533 0 0.00017453 0.00034907 0.0279253 0.0872665 0.174533 2.0944)
              y=(0.0155805 0.0179938 0.0275081 0.0296564 0.0307615 0.0365695 0.0422074 0.0450902 0.048391 0.0534299 0.0617576 0.0617669 0.0617762 0.0633083 0.066994 0.0733035 0.0573481)
        y_location: MultiplierFunction: scale=1.15479
          SimmSpline: x=(-2.0944 -1.99997 -1.5708 -1.45752 -1.39626 -1.0472 -0.698132 -0.526391 -0.349066 -0.174533 0 0.00017453 0.00034907 0.0279253 0.0872665 0.174533 2.0944)
              y=(0.0234116 0.0237613 0.0251141 0.0252795 0.0253146 0.0249184 0.0242373 0.0238447 0.0234197 0.0227644 0.020984 0.0209814 0.0209788 0.0205225 0.0191754 0.0159554 -0.0673774)
        z_location: MultiplierFunction: scale=1.15479
          SimmSpline: x=(-2.0944 0.1745) y=(0.0014 0.0014)
    Millard2012EquilibriumMuscle vasti_r: max_isometric_force=1000 optimal_fiber_length=0.107568
        tendon_slack_length=0.1166158 pennation_angle_at_optimal=0.05235988
      PathPoint vas_int_r-P1: femur_r (0.0296148 -0.1964789 0.0316572)
      PathPoint vas_int_r-P2: femur_r (0.0342102 -0.2128181 0.0291042)
      ConditionalPathPoint vas_int_r-P3: femur_r (0.03502716 -0.4115436 0.0056166)
          socket_coordinate=/jointset/knee_r/knee_angle_r range=(-2.61799 -1.42)
      MovingPathPoint vas_int_r-P4: tibia_r socket_x_coordinate=/jointset/knee_r/knee_angle_r
          socket_y_coordinate=/jointset/knee_r/knee_angle_r socket_z_coordinate=/jointset/knee_r/knee_angle_r
        x_location: MultiplierFunction: scale=1.15479
          SimmSpline: x=(-2.0944 -1.99997 -1.5708 -1.45752 -1.39626 -1.0472 -0.698132 -0.526391 -0.349066 -0.174533 0 0.00017453 0.00034907 0.0279253 0.0872665 0.174533 2.0944)
              y=(0.0082733 0.0106866 0.0202042 0.022353 0.0234583 0.0292715 0.0349465 0.037871 0.0412569 0.0465287 0.0554632 0.0554735 0.0554837 0.0571717 0.061272 0.0684368 0.0648818)
        y_location: MultiplierFunction: scale=1.15479
          SimmSpline: x=(-2.0944 -1.99997 -1.5708 -1.45752 -1.39626 -1.0472 -0.698132 -0.526391 -0.349066 -0.174533 0 0.00017453 0.00034907 0.0279253 0.0872665 0.174533 2.0944)
              y=(0.025599 0.0259487 0.0273124 0.0274796 0.0275151 0.0271363 0.0265737 0.0263073 0.0261187 0.0260129 0.0252923 0.0252911 0.0252898 0.0250526 0.0242191 0.0218288 -0.0685706)
        z_location: MultiplierFunction: scale=1.15479
          SimmSpline: x=(-2.0944 2.0944) y=(0.0018 0.0018)
    Millard2012EquilibriumMuscle gastroc_r: max_isometric_force=2500 optimal_fiber_length=0.1031922
        tendon_slack_length=0.4127687 pennation_angle_at_optimal=0.296706
      PathPoint med_gas_r-P1: femur_r (-0.0194028 -0.4012295 -0.0239982)
      ConditionalPathPoint med_gas_r-P2: femur_r (-0.030636 -0.4107266 -0.02634696)
          socket_coordinate=/jointset/knee_r/knee_angle_r range=(-0.785398 0.174533)
      PathPoint med_gas_r-P3: calcn_r (0 0.031 -0.0053)
    Millard2012EquilibriumMuscle soleus_r: max_isometric_force=5137 optimal_fiber_length=0.05726067
        tendon_slack_length=0.2863034 pennation_angle_at_optimal=0.4363323
      PathPoint P1: tibia_r (-0.002771496 -0.1770293 0.008199009)
      PathPoint P2: calcn_r (0 0.031 -0.0053)
    Millard2012EquilibriumMuscle tib_ant_r: max_isometric_force=3000 optimal_fiber_length=0.1104687
        tendon_slack_length=0.2513727 pennation_angle_at_optimal=0.08726646
      PathPoint P1: tibia_r (0.02067074 -0.1875379 0.01328008)
      PathPoint P2: tibia_r (0.03799259 -0.4562575 -0.02043978)
      PathPoint P3: calcn_r (0.1166 0.0178 -0.0305)
    Millard2012EquilibriumMuscle hamstrings_l: max_isometric_force=1500 optimal_fiber_length=0.1109893
        tendon_slack_length=0.3319498 pennation_angle_at_optimal=0
      PathPoint bifemlh_l-P1: pelvis (-0.12596 -0.10257 -0.06944)
      PathPoint bifemlh_l-P2: tibia_l (-0.03475918 -0.04157244 -0.03398547)
      PathPoint bifemlh_l-P3: tibia_l (-0.02702209 -0.06501468 -0.0396093)
    Millard2012EquilibriumMuscle bifemsh_l: max_isometric_force=804 optimal_fiber_length=0.1774259
        tendon_slack_length=0.09127691 pennation_angle_at_optimal=0.4014257
      PathPoint P1: femur_l (0.005106 -0.2155753 -0.02389608)
      PathPoint P2: tibia_l (-0.03475918 -0.04157244 -0.03398547)
      PathPoint P3: tibia_l (-0.02702209 -0.06501468 -0.0396093)
    Millard2012EquilibriumMuscle glut_max_l: max_isometric_force=1000 optimal_fiber_length=0.1585132
        tendon_slack_length=0.07405367 pennation_angle_at_optimal=0
      PathPoint P1: pelvis (-0.1317 0.0087 -0.0462)
      PathPoint P2: pelvis (-0.1344 -0.0609 -0.0813)
      PathPoint P3: femur_l (-0.045954 -0.05963808 -0.02573424)
      PathPoint P4: femur_l (-0.01593072 -0.1037539 -0.04278828)
    Millard2012EquilibriumMuscle iliopsoas_l: max_isometric_force=2342 optimal_fiber_length=0.1004273
        tendon_slack_length=0.1606836 pennation_angle_at_optimal=0.1396263
      PathPoint psoas_l-P1: pelvis (-0.0647 0.0887 -0.0289)
      PathPoint psoas_l-P2: pelvis (-0.0238 -0.057 -0.0759)
      ConditionalPathPoint psoas_l-P3: pelvis (-0.0288 -0.0805 -0.0816) socket_coordinate=/jointset/hip_l/hip_flexion_l
          range=(-1.5708 0.785398)
      PathPoint psoas_l-P4: femur_l (0.00163392 -0.05177484 -0.00388056)
      PathPoint psoas_l-P5: femur_l (-0.01919856 -0.06096564 -0.01062048)
    Millard2012EquilibriumMuscle rect_fem_l: max_isometric_force=2000 optimal_fiber_length=0.1176261
        tendon_slack_length=0.3198603 pennation_angle_at_optimal=0.08726646
      PathPoint P1: pelvis (-0.0295 -0.0311 -0.0968)
      ConditionalPathPoint P2: femur_l (0.03410808 -0.4115436 -0.00194028)
          socket_coordinate=/jointset/knee_l/knee_angle_l range=(-2.61799 -1.45997)
      MovingPathPoint P3: tibia_l socket_x_coordinate=/jointset/knee_l/knee_angle_l
          socket_y_coordinate=/jointset/knee_l/knee_angle_l socket_z_coordinate=/jointset/knee_l/knee_angle_l
        x_location: MultiplierFunction: scale=1.15479
          SimmSpline: x=(-2.0944 -1.99997 -1.5708 -1.45752 -1.39626 -1.0472 -0.698132 -0.526391 -0.349066 -0.174533 0 0.00017453 0.00034907 0.0279253 0.0872665 0.174533 2.0944)
              y=(0.0155805 0.0179938 0.0275081 0.0296564 0.0307615 0.0365695 0.0422074 0.0450902 0.048391 0.0534299 0.0617576 0.0617669 0.0617762 0.0633083 0.066994 0.0733035 0.0573481)
        y_location: MultiplierFunction: scale=1.15479
          SimmSpline: x=(-2.0944 -1.99997 -1.5708 -1.45752 -1.39626 -1.0472 -0.698132 -0.526391 -0.349066 -0.174533 0 0.00017453 0.00034907 0.0279253 0.0872665 0.174533 2.0944)
              y=(0.0234116 0.0237613 0.0251141 0.0252795 0.0253146 0.0249184 0.0242373 0.0238447 0.0234197 0.0227644 0.020984 0.0209814 0.0209788 0.0205225 0.0191754 0.0159554 -0.0673774)
        z_location: MultiplierFunction: scale=1.15479
          SimmSpline: x=(-2.0944 0.1745) y=(-0.0014 -0.0014)
    Millard2012EquilibriumMuscle vasti_l: max_isometric_force=1000 optimal_fiber_length=0.1104336
        tendon_slack_length=0.1197224 pennation_angle_at_optimal=0.05235988
      PathPoint vas_int_l-P1: femur_l (0.0296148 -0.1964789 -0.0316572)
      PathPoint vas_int_l-P2: femur_l (0.0342102 -0.2128181 -0.0291042)
      ConditionalPathPoint vas_int_l-P3: femur_l (0.03502716 -0.4115436 -0.0056166)
          socket_coordinate=/jointset/knee_l/knee_angle_l range=(-2.61799 -1.42)
      MovingPathPoint vas_int_l-P4: tibia_l socket_x_coordinate=/jointset/knee_l/knee_angle_l
          socket_y_coordinate=/jointset/knee_l/knee_angle_l socket_z_coordinate=/jointset/knee_l/knee_angle_l
        x_location: MultiplierFunction: scale=1.15479
          SimmSpline: x=(-2.0944 -1.99997 -1.5708 -1.45752 -1.39626 -1.0472 -0.698132 -0.526391 -0.349066 -0.174533 0 0.00017453 0.00034907 0.0279253 0.0872665 0.174533 2.0944)
              y=(0.0082733 0.0106866 0.0202042 0.022353 0.0234583 0.0292715 0.0349465 0.037871 0.0412569 0.0465287 0.0554632 0.0554735 0.0554837 0.0571717 0.061272 0.0684368 0.0648818)
        y_location: MultiplierFunction: scale=1.15479
          SimmSpline: x=(-2.0944 -1.99997 -1.5708 -1.45752 -1.39626 -1.0472 -0.698132 -0.526391 -0.349066 -0.174533 0 0.00017453 0.00034907 0.0279253 0.0872665 0.174533 2.0944)
              y=(0.025599 0.0259487 0.0273124 0.0274796 0.0275151 0.0271363 0.0265737 0.0263073 0.0261187 0.0260129 0.0252923 0.0252911 0.0252898 0.0250526 0.0242191 0.0218288 -0.0685706)
        z_location: MultiplierFunction: scale=1.15479
          SimmSpline: x=(-2.0944 2.0944) y=(-0.0018 -0.0018)
    Millard2012EquilibriumMuscle gastroc_l: max_isometric_force=2500 optimal_fiber_length=0.10406
        tendon_slack_length=0.4162401 pennation_angle_at_optimal=0.296706
      PathPoint med_gas_l-P1: femur_l (-0.0194028 -0.4012295 0.0239982)
      ConditionalPathPoint med_gas_l-P2: femur_l (-0.030636 -0.4107266 0.02634696)
          socket_coordinate=/jointset/knee_l/knee_angle_l range=(-0.785398 0.174533)
      PathPoint med_gas_l-P3: calcn_l (0 0.031 0.0053)
    Millard2012EquilibriumMuscle soleus_l: max_isometric_force=5137 optimal_fiber_length=0.05726067
        tendon_slack_length=0.2863034 pennation_angle_at_optimal=0.4363323
      PathPoint P1: tibia_l (-0.002771496 -0.1770293 -0.008199009)
      PathPoint P2: calcn_l (0 0.031 0.0053)
    Millard2012EquilibriumMuscle tib_ant_l: max_isometric_force=3000 optimal_fiber_length=0.1104687
        tendon_slack_length=0.2513727 pennation_angle_at_optimal=0.08726646
      PathPoint P1: tibia_l (0.02067074 -0.1875379 -0.01328008)
      PathPoint P2: tibia_l (0.03799259 -0.4562575 0.02043978)
      PathPoint P3: calcn_l (0.1166 0.0178 0.0305)
    ElasticFoundationForce RPedalForce: transition_velocity=0.1
      ContactParametersSet contact_parameters:
        ContactParameters: geometry=(RPedalContact RFootSupportContact) stiffness=100000000 dissipation=25
            static_friction=0.9 dynamic_friction=0.9 viscous_friction=0.6
    ElasticFoundationForce LPedalForce: transition_velocity=0.1
      ContactParametersSet contact_parameters:
        ContactParameters: geometry=(LPedalContact LFootSupportContact) stiffness=100000000 dissipation=25
            static_friction=0.9 dynamic_friction=0.9 viscous_friction=0.6
    TorqueActuator knee_torqueR: bodyA=femur_r bodyB=tibia_r torque_is_global=true axis=(0 0 -1) optimal_force=100
    TorqueActuator knee_torqueL: bodyA=femur_l bodyB=tibia_l torque_is_global=true axis=(0 0 -1) optimal_force=100
    TorqueActuator gear_load: bodyA=Gear bodyB=ground torque_is_global=true axis=(0 0 -1) optimal_force=100
  MarkerSet:
    Marker r_trocanter: femur_r (-0.0250192 -0.02328631 0.05834235)
    Marker r_femur_Distal: femur_r (0.01518294 -0.4156265 0.03523178)
    Marker r_tibia_Prox: tibia_r (-0.004164628 -0.0903484 0.04944852)
    Marker r_tibia_Distal: tibia_r (-0.005552222 -0.4702879 0.04297284)
    Marker r_Pelvis: pelvis (-0.02715315 0.04397723 0.1322194)
    Marker L_Pelvis: pelvis (-0.0271531 0.0439772 -0.132219)
    Marker Centro_Gear: pelvis (0.4639602 -0.5328754 0.112219)
    Marker Ponta_Pedal: Gear (-0.0006704796 0.1720003 0.04422844)
    Marker Centro_Pedal: Gear (-0.0006704797 -5.927894e-5 0.04422842)
  ContactGeometrySet:
    ContactMesh RFootSupportContact: socket_frame=/bodyset/Right_Foot_Support location=(0 0 0) filename=pedalWrap.obj
    ContactMesh LFootSupportContact: socket_frame=/bodyset/Left_Foot_Support location=(0 0 0) filename=pedalWrap.obj
    ContactMesh RPedalContact: socket_frame=/bodyset/Right_Pedal location=(0 0 0) filename=pedal.obj
    ContactMesh LPedalContact: socket_frame=/bodyset/Left_Pedal location=(0 0 0) filename=pedal.obj
